// COMSOL Multiphysics 6.2.0.658 model "acoustic-solid_tmatrix_3D_background_sphere.mph"
// Outline of the model tree

Parameters
  l_max = 1  // Maximum degree
  l_in = 0  // Degree incident wave
  m_in = 0  // Order incident wave
  l_out = 0  // Degree scattered wave
  m_out = 0  // Order scattered wave
  r_decomp = 0.6[cm]  // Radius of the decomposition
  r_domain = 3*lam_domain  // Radius of the domain
  d_pml = 2*lam_domain  // Thickness PML
  r_obj = 0.5[cm]  // Radius of the object
  rho_domain = 998[kg/m^3]  // Density of the domain
  c_domain = 1497 [m/s]  // Speed of sound of the domain
  rho_obj = 1050-50i[kg/m^3]  // Density of the object
  c_obj = 2350+300i[m/s]  // Speed of pressure waves of the object
  c_obj_t = 1000+200i[m/s]  // Speed of shear waves of the object
  f_0 = 200[kHz]  // Frequency
  lam_domain = c_domain/f_0  // Wavelength in the domain
  lam_obj = c_obj/f_0  // Wavelength of pressure waves in the object
  lam_obj_t = c_obj_t/f_0  // Wavelength of shear waves in the object

Functions
  an1: Analytic "Spherical Bessel First Kind" | funcname = sphbesselj; expr = sqrt(pi / (2 * (x + 1e-9))) * besselj(l + 0.5, x); args = {l, x}
  an2: Analytic "Spherical Hankel Second Kind" | funcname = sphhankelh2; expr = sqrt(pi / (2 * x)) * (besselj(l + 0.5, x) - i * bessely(l + 0.5, x)); args = {l, x}; complex = on
  an3: Analytic "Prefactor SH" | funcname = gammalm; expr = sqrt((2 * l + 1) * factorial(l - m) / (4 * pi * factorial(l + m))); args = {l, m}
  an4: Analytic "Scalar Spherical Y" | funcname = Ylm; expr = gammalm(l, m) * exp(i * m * phi) * legendre(l, m, cos(theta)); args = {l, m, theta, phi}; complex = on
  an5: Analytic "Scalar Spherical RgPsi" | funcname = RgPsi; expr = sphbesselj(l, x) * Ylm(l, m, theta, phi); args = {l, m, x, theta, phi}; complex = on

Variables
  var1 "Variables Simulation"
    r = sqrt(x * x + y * y + z * z)  // Radius
    theta = atan2(sqrt(x * x + y * y), z)  // Polar angle
    phi = atan2(y, x)  // Azimuthal angle
    p_inc = conj(RgPsi(l_in, m_in, acpr.omega/c_domain * r, theta, phi)) * 1[Pa]  // Incident P-field
  var2 "Variables Decomposition"
    xp = acpr.omega/c_domain * r_decomp
    shh2p = sphhankelh2(l_out, xp)
    intY = intop1(Ylm(l_out, m_out, theta, phi) * acpr.p_s) / (r_decomp^2)
    ap = conj(intY/shh2p) * 1[1/Pa]

Couplings
  intop1: Integration on boundaries 17-20, 35, 36, 45, 50

Coordinate systems
  pml1: PML "Perfectly Matched Layer 1" on domains 1-4, 11, 12, 15, 18 | ScalingType = Spherical

Geometry
  geom1 "Geometry 1" (3D, length unit cm)
    sph1: Sphere "Object" | r = r_obj
    sph2: Sphere "Domain" | layername = {Layer 1, Layer 2}; layer = {d_pml, r_domain - r_decomp}; r = r_domain + d_pml
    fin: Finalize "Form Union"

Materials
  mat1: Common "Material Domain" on all domains
    def "Basic"
      density = rho_domain
      soundspeed = c_domain
  mat2: Common "Material Object" on domains 10
    def "Basic"
      density = rho_obj
      soundspeed = c_obj
    CpCs "Pressure-wave and shear-wave speeds"
      cp = c_obj
      cs = c_obj_t

Physics
  acpr: PressureAcoustics "Pressure Acoustics, Frequency Domain" on domains 1-9, 11-18
    dependent variable p
    fpam1: FrequencyPressureAcousticsModel "Pressure Acoustics 1" (default)
    shb1: SoundHard "Sound Hard Boundary (Wall) 1" (default)
    init1: init "Initial Values 1" (default)
    bpf1: BackgroundPressureField on domains 5-9, 13, 14, 16, 17
      p = p_inc
      PressureFieldType = UserDefined
      pamp = 1
      c_mat = userdef
      c = c_0
  solid: SolidMechanics on domains 10
    dependent variable u = {u, v, w}
    lemm1: LinearElasticModel "Linear Elastic Material 1" (default) | IsotropicOption = CpCs
    free1: Free (default)
    init1: init "Initial Values 1" (default)

Multiphysics
  asb1: AcousticStructureBoundary on boundaries 21-24, 37, 38, 46, 47
    Acoustics_physics = acpr
    Structure_physics = solid

Mesh
  mesh1 "Mesh 1"
    size: MeshSizeDefault | hmax = lam_domain/5; custom = on
    size1: Size on domains 10 | hmax = min(r_obj/5, lam_obj_t/5); custom = on
    ftet1: FreeTet "Free Tetrahedral 1" on domains 5-10, 13, 14, 16, 17
    swe1: Sweep "Swept 1" on domains 1-4, 11, 12, 15, 18
      dis1: Distribution on domains 1-4, 11, 12, 15, 18 | numelem = 7
    dis1: Distribution on edges 19, 22, 33, 48, 56, 60 | numelem = 7

Studies
  std1 "Study 1"
    param2: Parametric "Parametric Sweep l_out" | pname = l_out; plistarr = range(0, 1, l_max)
    param: Parametric "Parametric Sweep l_in" | pname = l_in; plistarr = range(0, 1, l_max)
    freq: Frequency "Frequency Domain"
      punit = kHz
      plist = f_0
      notstudy = zero
      useparam = on
      sweeptype = filled
      usestoresel = all

Solver configurations
  sol1 "Solution 1" (study std1)
    v1: Variables "Dependent Variables 1"
    s1: Stationary "Stationary Solver 1" | linpmethod = sol
      p1: Parametric
        sweeptype = filled
        pname = {freq, m_out, m_in}
        plistarr = {f_0, range(-l_out,1,l_out), range(-l_in,1,l_in)}
        punit = {kHz, , }
        pcontinuationmode = no
      fc1: FullyCoupled | linsolver = d1
      d1: Direct "Suggested Direct Solver (acpr)"
  sol2 "Parametric Solutions 1" (study std1)

Datasets
  dset1: Solution | solution = sol1
  cpl1: CutPlane | data = dset1; quickplane = xz
  dset2: Solution | solution = sol2

Derived values
  gev1: EvalGlobal "Global Evaluation 1" | data = dset2; table = tbl31; expr = ap

Tables
  tbl23: Table
    // Global Evaluation 1
    l_out | l_in | m_in | m_out | freq | ap (1)
    0 | 0 | 0 | 0 | 200000 | -0.965926+0.182043i
    0 | 1 | -1 | 0 | 200000 | -1.9943e-05+2.0268e-05i
    0 | 1 | 0 | 0 | 200000 | -7.62249e-05-3.59399e-05i
    0 | 1 | 1 | 0 | 200000 | -1.98092e-05+1.47222e-05i
    1 | 0 | 0 | -1 | 200000 | 2.46074e-05-2.58083e-05i
    1 | 0 | 0 | 0 | 200000 | 1.01082e-05-1.06347e-05i
    1 | 0 | 0 | 1 | 200000 | -3.98725e-05-2.90525e-05i
    1 | 1 | -1 | -1 | 200000 | -0.93913-0.210955i
    1 | 1 | 0 | -1 | 200000 | -1.97372e-05-2.10877e-06i
    1 | 1 | 1 | -1 | 200000 | 4.36371e-05-2.17554e-06i
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  tbl24: Table
    // Global Evaluation 1
    l_out | l_in | m_in | m_out | freq | ap (1)
    0 | 0 | 0 | 0 | 200000 | -0.967651+0.180689i
    0 | 1 | -1 | 0 | 200000 | -3.70167e-05+5.69824e-06i
    0 | 1 | 0 | 0 | 200000 | 4.77822e-05+1.10173e-05i
    0 | 1 | 1 | 0 | 200000 | 3.59966e-05+5.35645e-05i
    1 | 0 | 0 | -1 | 200000 | 1.06499e-05+2.76101e-06i
    1 | 0 | 0 | 0 | 200000 | 4.68622e-08-7.95395e-07i
    1 | 0 | 0 | 1 | 200000 | -4.1192e-06+1.56039e-05i
    1 | 1 | -1 | -1 | 200000 | -0.940296-0.21231i
    1 | 1 | 0 | -1 | 200000 | -3.16714e-06+3.3182e-06i
    1 | 1 | 1 | -1 | 200000 | 1.75557e-05+3.23496e-06i
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  tbl25: Table
    // Global Evaluation 1
    l_out | l_in | m_in | m_out | freq | ap (1)
    0 | 0 | 0 | 0 | 200000 | 0.967651-0.180689i
    0 | 1 | -1 | 0 | 200000 | 3.70167e-05-5.69824e-06i
    0 | 1 | 0 | 0 | 200000 | -4.77822e-05-1.10173e-05i
    0 | 1 | 1 | 0 | 200000 | -3.59966e-05-5.35645e-05i
    1 | 0 | 0 | -1 | 200000 | -1.06499e-05-2.76101e-06i
    1 | 0 | 0 | 0 | 200000 | -4.68625e-08+7.95395e-07i
    1 | 0 | 0 | 1 | 200000 | 4.1192e-06-1.56039e-05i
    1 | 1 | -1 | -1 | 200000 | 0.940296+0.21231i
    1 | 1 | 0 | -1 | 200000 | 3.16714e-06-3.3182e-06i
    1 | 1 | 1 | -1 | 200000 | -1.75557e-05-3.23496e-06i
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  tbl26: Table
    // Global Evaluation 1
    l_out | l_in | m_in | m_out | freq | ap (1)
    0 | 0 | 0 | 0 | 200000 | -0.967725+0.180695i
    0 | 1 | -1 | 0 | 200000 | -3.68919e-05+5.12142e-06i
    0 | 1 | 0 | 0 | 200000 | 4.73674e-05+1.05771e-05i
    0 | 1 | 1 | 0 | 200000 | 3.70123e-05+5.49666e-05i
    1 | 0 | 0 | -1 | 200000 | 1.0321e-05+3.32002e-06i
    1 | 0 | 0 | 0 | 200000 | -8.32281e-07-9.86569e-07i
    1 | 0 | 0 | 1 | 200000 | -4.06607e-06+1.62719e-05i
    1 | 1 | -1 | -1 | 200000 | -0.95119-0.214769i
    1 | 1 | 0 | -1 | 200000 | -1.53843e-06+2.24534e-06i
    1 | 1 | 1 | -1 | 200000 | 2.03162e-05-7.01632e-07i
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  tbl27: Table
    // Global Evaluation 1
    l_out | l_in | m_in | m_out | freq | ap (1)
    0 | 0 | 0 | 0 | 200000 | -0.967725+0.180695i
    0 | 1 | -1 | 0 | 200000 | -3.68919e-05+5.12142e-06i
    0 | 1 | 0 | 0 | 200000 | 4.73674e-05+1.05771e-05i
    0 | 1 | 1 | 0 | 200000 | 3.70123e-05+5.49666e-05i
    1 | 0 | 0 | -1 | 200000 | 1.0321e-05+3.32002e-06i
    1 | 0 | 0 | 0 | 200000 | -8.32279e-07-9.86566e-07i
    1 | 0 | 0 | 1 | 200000 | -4.06607e-06+1.62719e-05i
    1 | 1 | -1 | -1 | 200000 | -0.95119-0.214769i
    1 | 1 | 0 | -1 | 200000 | -1.53843e-06+2.24534e-06i
    1 | 1 | 1 | -1 | 200000 | 2.03162e-05-7.0163e-07i
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  tbl28: Table
    // Global Evaluation 1
    l_out | l_in | m_in | m_out | freq | ap (1)
    0 | 0 | 0 | 0 | 200000 | -0.104497-0.306047i
    0 | 1 | -1 | 0 | 200000 | -5.97739e-06+1.34229e-05i
    0 | 1 | 0 | 0 | 200000 | 2.27434e-05+2.79925e-05i
    0 | 1 | 1 | 0 | 200000 | -1.12602e-05+4.0466e-05i
    1 | 0 | 0 | -1 | 200000 | -1.77571e-05+2.52656e-06i
    1 | 0 | 0 | 0 | 200000 | 8.48387e-06-9.10312e-06i
    1 | 0 | 0 | 1 | 200000 | 2.67036e-08-2.42463e-08i
    1 | 1 | -1 | -1 | 200000 | -0.772892+0.418023i
    1 | 1 | 0 | -1 | 200000 | -2.15694e-05-6.69973e-07i
    1 | 1 | 1 | -1 | 200000 | 4.48934e-07+1.06553e-05i
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  tbl31: Table
    // Global Evaluation 1
    l_out | l_in | m_in | m_out | freq | ap (1)
    0 | 0 | 0 | 0 | 200000 | -0.699814-0.0846497i
    0 | 1 | -1 | 0 | 200000 | 2.76313e-06-1.78832e-05i
    0 | 1 | 0 | 0 | 200000 | 2.13939e-05-2.14802e-05i
    0 | 1 | 1 | 0 | 200000 | 4.49014e-06-2.85896e-05i
    1 | 0 | 0 | -1 | 200000 | 2.69308e-05-2.6155e-05i
    1 | 0 | 0 | 0 | 200000 | -3.52821e-05+7.95722e-06i
    1 | 0 | 0 | 1 | 200000 | 1.29144e-05-1.47253e-05i
    1 | 1 | -1 | -1 | 200000 | -0.783599-0.18358i
    1 | 1 | 0 | -1 | 200000 | 4.62095e-06-6.71653e-06i
    1 | 1 | 1 | -1 | 200000 | 1.22594e-05+1.55682e-05i
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