// COMSOL Multiphysics 6.2.0.658 model "acoustic-solid_tmatrix_axisym_background_sphere.mph"
// Outline of the model tree

Parameters
  m_in = 0  // Order incident wave
  l_out = 0  // Degree scattered wave
  l_in = 0  // Degree incident wave
  l_max = 1  // Maximum degree
  r_decomp = 0.6[cm]  // Radius of the decomposition
  r_domain = 3*lam_domain  // Radius of the domain
  d_pml = 2*lam_domain  // Thickness PML
  r_obj = 0.5[cm]  // Radius of the object
  rho_domain = 998[kg/m^3]  // Density of the domain
  c_domain = 1497 [m/s]  // Speed of sound of the domain
  rho_obj = 1050-50i[kg/m^3]  // Density of the object
  c_obj = 2350+300i[m/s]  // Speed of pressure waves in the object
  c_obj_t = 1000+200i[m/s]  // Speed of shear waves in the object
  f_0 = 200[kHz]  // Frequency
  lam_domain = c_domain/f_0  // Wavelength in the domain
  lam_obj = c_obj/f_0  // Wavelength of pressure waves in the object
  lam_obj_t = c_obj_t/f_0  // Wavelength of shear waves in the object

Functions
  an1: Analytic "Spherical Bessel First Kind" | funcname = sphbesselj; expr = sqrt(pi / (2 * (x + 1e-9))) * besselj(l + 0.5, x); args = {l, x}; argunit = {, }
  an2: Analytic "Spherical Hankel Second Kind" | funcname = sphhankelh2; expr = sqrt(pi / (2 * x)) * (besselj(l + 0.5, x) - i * bessely(l + 0.5, x)); args = {l, x}; argunit = {, }; complex = on
  an3: Analytic "Prefactor SH" | funcname = gammalm; expr = sqrt((2 * l + 1) * factorial(l - m) / (4 * pi * factorial(l + m))); args = {l, m}; argunit = {, }
  an4: Analytic "Scalar Spherical Y" | funcname = Ylm; expr = gammalm(l, m) * exp(i * m * phi) * legendre(l, m, cos(theta)); args = {l, m, theta, phi}; argunit = {, , , }; complex = on
  an5: Analytic "Scalar Spherical RgPsi" | funcname = RgPsi; expr = sphbesselj(l, x) * Ylm(l, m, theta, phi); args = {l, m, x, theta, phi}; argunit = {, , , , }; complex = on

Variables
  var1 "Variables Simulation"
    rs = sqrt(r * r + z * z)  // Radius
    theta = atan2(r, z)  // Polar angle
    p_inc = conj(RgPsi(l_in, m_in, acpr.omega/c_domain * rs, theta, 0)) * 1[Pa]  // Incident P-field
  var2 "Variables Decomposition"
    xp = acpr.omega/c_domain * r_decomp
    shh2p = sphhankelh2(l_out, xp)
    intY = 2*pi*intop1(sin(theta) * Ylm(l_out, m_in, theta, 0) *acpr.p_s) / (r_decomp)
    ap = conj(intY/shh2p) * 1[1/Pa]

Couplings
  intop1: Integration on boundaries 13, 16

Coordinate systems
  pml1: PML "Perfectly Matched Layer 1" on domains 1, 6

Geometry
  geom1 "Geometry 1" (2D axisymmetric, length unit mm)
    c1: Circle "Object" | rot = -90; r = r_obj; angle = 180
    c2: Circle "Domain"
      rot = -90
      layername = {Layer 1, Layer 2}
      layer = {d_pml, r_domain - r_decomp}
      r = r_domain + d_pml
      angle = 180
    fin: Finalize "Form Union"

Materials
  mat1: Common "Material Domain" on all domains
    def "Basic"
      density = rho_domain
      soundspeed = c_domain
  mat2: Common "Material Object" on domains 4
    def "Basic"
      density = rho_obj
      soundspeed = c_obj
    CpCs "Pressure-wave and shear-wave speeds"
      cp = c_obj
      cs = c_obj_t

Physics
  acpr: PressureAcoustics "Pressure Acoustics, Frequency Domain" on domains 1-3, 5, 6
    dependent variable p
    MeshControl.ElementsPerWavelength = Automatic
    EquationSettings.m = m_in
    PortSweepSettings.ModeShapeNormalization = Amplitude
    fpam1: FrequencyPressureAcousticsModel "Pressure Acoustics 1" (default)
    axi1: AxialSymmetry (default)
    shb1: SoundHard "Sound Hard Boundary (Wall) 1" (default)
    init1: init "Initial Values 1" (default)
    bpf1: BackgroundPressureField on domains 2-5
      p = p_inc
      CalculateIntensity = 0
      PressureFieldType = UserDefined
      c_mat = from_mat
  solid: SolidMechanics on domains 4
    dependent variable u = {u, v, w}
    Mode2Daxi.ModeExtension = 1
    Mode2Daxi.mk = m_in
    lemm1: LinearElasticModel "Linear Elastic Material 1" (default) | IsotropicOption = CpCs
    axi1: AxialSymmetrySolid "Axial Symmetry 1" (default)
    free1: Free (default)
    init1: init "Initial Values 1" (default)

Multiphysics
  asb1: AcousticStructureBoundary on boundaries 14, 15 | Acoustics_physics = acpr; Structure_physics = solid

Mesh
  mesh1 "Mesh 1"
    size: MeshSizeDefault | hmax = 5.01; hmin = 0.0225; hcurve = 0.3; hgrad = 1.3
    size1: Size on domains 2-5 | hmax = lam_domain/10
    dis1: Distribution on boundaries 1, 8, 10 | type = predefined; elemcount = 8
    ftri2: FreeTri "Free Triangular 2" on domains 4
      size1: Size on domains 4 | hmax = min(r_obj/10, lam_obj_t/10); custom = on
    ftri1: FreeTri "Free Triangular 1" on domains 2, 3, 5
    map1: Map "Mapped 1" on domains 1, 6 | adjustedgdistr = on; smoothmaxiter = 4; smoothmaxdepth = 4

Studies
  std2 "Study 1"
    param: Parametric "Parametric Sweep l_out" | pname = l_out; plistarr = range(0,1,l_max)
    param2: Parametric "Parametric Sweep l_in" | pname = l_in; plistarr = range(0,1,l_in)
    freq: Frequency "Frequency Domain" | plist = f_0; useparam = on; sweeptype = filled

Solver configurations
  sol2 "Solution 2" (study std2)
    v1: Variables "Dependent Variables 1"
    s1: Stationary "Stationary Solver 1" | linpmethod = sol
      dDef: Direct
      fcDef: FullyCoupled
      p1: Parametric
        sweeptype = filled
        pname = {freq, m_in}
        plistarr = {f_0, range(-min(l_in, l_out), 1, min(l_in, l_out))}
        punit = {Hz, }
        pcontinuationmode = no
  sol3 "Parametric Solutions 1" (study std2)

Datasets
  dset2: Solution | solution = sol2
  dset3: Solution | solution = sol3

Derived values
  gev1: EvalGlobal "Global Evaluation 1" | data = dset3; table = new; expr = ap