// COMSOL Multiphysics 6.2.0.658 model "acoustic_tmatrix_3D_fastsweep_sphere.mph"
// Outline of the model tree

Parameters
  l_max = 2  // Maximum degree
  l_in = floor(sqrt(mpind)+1e-3)  // Degree incident wave
  m_in = mpind - l_in^2 - l_in  // Order incident wave
  l_out = 0  // Degree scattered wave
  m_out = 0  // Order scattered wave
  mpind = 0  // Index for sweeping
  mpindmax = l_max^2 + 2*l_max
  r_decomp = 0.6[cm]  // Radius of the decomposition
  r_domain = 3*lam_domain  // Radius of the domain
  d_pml = 2*lam_domain  // Thickness PML
  r_obj = 0.5[cm]  // Radius of the object
  rho_domain = 998[kg/m^3]  // Density of the domain
  c_domain = 1497 [m/s]  // Speed of sound of the domain
  rho_obj = 1050-50i[kg/m^3]  // Density of the object
  c_obj = 2350+300i[m/s]  // Speed of sound of the object
  f_0 = 200[kHz]  // Frequency
  lam_domain = c_domain/f_0  // Wavelength in the domain
  lam_obj = c_obj/f_0  // Wavelength in the object

Functions
  an1: Analytic "Spherical Bessel First Kind" | funcname = sphbesselj; expr = sqrt(pi / (2 * (x + 1e-9))) * besselj(l + 0.5, x); args = {l, x}
  an2: Analytic "Spherical Hankel Second Kind" | funcname = sphhankelh2; expr = sqrt(pi / (2 * x)) * (besselj(l + 0.5, x) - i * bessely(l + 0.5, x)); args = {l, x}; complex = on
  an8: Analytic "Pi function" | funcname = pilm; expr = -0.5 * (legendre(l + 1, m + 1, cos(theta)) + (l - m + 1) * (l - m + 2) * legendre(l + 1, m - 1, cos(theta))); args = {l, m, theta}
  an9: Analytic "Tau function" | funcname = taulm; expr = (legendre(l, m + 1, cos(theta)) - (l + m) * (l - m + 1) * legendre(l, m - 1, cos(theta))) * 0.5; args = {l, m, theta}
  an3: Analytic "Prefactor SH" | funcname = gammalm; expr = sqrt((2 * l + 1) * factorial(l - m) / (4 * pi * factorial(l + m))); args = {l, m}
  an4: Analytic "Scalar Spherical Y" | funcname = Ylm; expr = gammalm(l, m) * exp(i * m * phi) * legendre(l, m, cos(theta)); args = {l, m, theta, phi}; complex = on
  an5: Analytic "Scalar Spherical RgPsi" | funcname = RgPsi; expr = sphbesselj(l, x) * Ylm(l, m, theta, phi); args = {l, m, x, theta, phi}; complex = on
  an6: Analytic "Vector Spherical RgLx"
    funcname = RgLx
    expr = ((l/(x+1e-9)*sphbesselj(l, x) - sphbesselj(l+1, x)) * legendre(l, m, cos(theta)) * sin(theta) * cos(phi) + (cos(theta) * cos(phi) * taulm(l, m, theta) - sin(phi) * i * pilm(l, m, theta)) * sphbesselj(l, x)/(x+1e-9)) * gammalm(l, m) * exp(i * m * phi)
    args = {l, m, x, theta, phi}
    complex = on
  an7: Analytic "Vector Spherical RgLy"
    funcname = RgLy
    expr = ((l/(x+1e-9)*sphbesselj(l, x) - sphbesselj(l+1, x)) * legendre(l, m, cos(theta)) * sin(theta) * sin(phi) + (cos(theta) * sin(phi) * taulm(l, m, theta) + cos(phi) * i * pilm(l, m, theta)) * sphbesselj(l, x)/(x+1e-9)) * gammalm(l, m) * exp(i * m * phi)
    args = {l, m, x, theta, phi}
    complex = on
  an10: Analytic "Vector Spherical RgLz"
    funcname = RgLz
    expr = ((l/(x+1e-9)*sphbesselj(l, x) - sphbesselj(l+1, x)) * legendre(l, m, cos(theta)) * cos(theta) - sin(theta) * taulm(l, m, theta) * sphbesselj(l, x)/(x+1e-9)) * gammalm(l, m) * exp(i * m * phi)
    args = {l, m, x, theta, phi}
    complex = on

Variables
  var1 "Variables Simulation"
    r = sqrt(x * x + y * y + z * z)  // Radius
    theta = atan2(sqrt(x * x + y * y), z)  // Polar angle
    phi = atan2(y, x)  // Azimuthal angle
    delta_rho = rho_obj - rho_domain
    delta_beta = (rho_obj*c_obj^2)^(-1) - (rho_domain*c_domain^2)^(-1)
    p_inc = conj(RgPsi(l_in, m_in, acpr.omega/c_domain * r, theta, phi)) * 1[Pa]  // Incident P-field
    vx_inc = conj(RgLx(l_in, m_in, acpr.omega/c_domain * r, theta, phi)) / (-i * rho_domain * c_domain) * 1[Pa]  // Incident V-field, x-component
    vy_inc = conj(RgLy(l_in, m_in, acpr.omega/c_domain * r, theta, phi)) / (-i * rho_domain * c_domain) * 1[Pa]  // Incident V-field, y-component
    vz_inc = conj(RgLz(l_in, m_in, acpr.omega/c_domain * r, theta, phi)) / (-i * rho_domain * c_domain) * 1[Pa]  // Incident V-field, z-component
    Q = acpr.omega^2 * delta_beta * p_inc  // Source monopole
    qx = -i*acpr.omega * delta_rho * vx_inc  // Source dipole, x-component
    qy = -i*acpr.omega * delta_rho * vy_inc  // Source dipole, y-component
    qz = -i*acpr.omega * delta_rho * vz_inc  // Source dipole, z-component
  var2 "Variables Decomposition"
    xp = acpr.omega/c_domain * r_decomp
    shh2p = sphhankelh2(l_out, xp)
    intY = intop1(Ylm(l_out, m_out, theta, phi) * withsol('sol1', acpr.p_s, setval(mpind, l_in^2 + m_in + l_in), setval(freq, freq))) / (r_decomp^2)
    ap = conj(intY/shh2p) * 1[1/Pa]

Couplings
  intop1: Integration on boundaries 17-20, 35, 36, 45, 50

Coordinate systems
  pml1: PML "Perfectly Matched Layer 1" on domains 1-4, 11, 12, 15, 18 | ScalingType = Spherical

Geometry
  geom1 "Geometry 1" (3D, length unit cm)
    sph1: Sphere "Object" | r = r_obj
    sph2: Sphere "Domain" | layername = {Layer 1, Layer 2}; layer = {d_pml, r_domain - r_decomp}; r = r_domain + d_pml
    fin: Finalize "Form Union"

Materials
  mat1: Common "Material Domain" on all domains
    def "Basic"
      density = rho_domain
      soundspeed = c_domain
  mat2: Common "Material Object" on domains 10
    def "Basic"
      density = rho_obj
      soundspeed = c_obj

Physics
  acpr: PressureAcoustics "Pressure Acoustics, Frequency Domain" on all domains
    dependent variable p
    fpam1: FrequencyPressureAcousticsModel "Pressure Acoustics 1" (default)
    shb1: SoundHard "Sound Hard Boundary (Wall) 1" (default)
    init1: init "Initial Values 1" (default)
    ms1: MonopoleSource "Monopole Domain Source 1" on domains 10 | Q = Q
    ds1: DipoleSource "Dipole Domain Source 1" on domains 10 | q = {qx, qy, qz}

Mesh
  mesh1 "Mesh 1"
    size: MeshSizeDefault | hmax = lam_domain/5; custom = on
    size1: Size on domains 10 | hmax = min(r_obj/5, lam_obj/5); custom = on
    ftet1: FreeTet "Free Tetrahedral 1" on domains 5-10, 13, 14, 16, 17
    swe1: Sweep "Swept 1" on domains 1-4, 11, 12, 15, 18
      dis1: Distribution on domains 1-4, 11, 12, 15, 18 | numelem = 7
    dis1: Distribution on edges 19, 22, 33, 48, 56, 60 | numelem = 7

Studies
  std1 "Study 1"
    freq: Frequency "Frequency Domain"
      punit = kHz
      plist = f_0
      notstudy = zero
      useparam = on
      sweeptype = filled
      usestoresel = all
  std2 "Study 2"
    param2: Parametric "Parametric Sweep l_out" | pname = l_out; plistarr = range(0, 1, l_max)
    param: Parametric "Parametric Sweep l_in" | pname = l_in; plistarr = range(0, 1, l_max)
    freq: Frequency "Frequency Domain" | punit = kHz; plist = f_0; useparam = on; sweeptype = filled

Solver configurations
  sol1 "Solution 1" (study std1)
    v1: Variables "Dependent Variables 1"
    s1: Stationary "Stationary Solver 1" | linpmethod = sol
      p1: Parametric
        sweeptype = filled
        pname = {freq, mpind}
        plistarr = {f_0, range(0,1,mpindmax)}
        punit = {kHz, }
        pcontinuationmode = no
      fc1: FullyCoupled | linsolver = d1
      d1: Direct "Suggested Direct Solver (acpr)"
  sol2 "Solution 2" (study std2)
    v1: Variables "Dependent Variables 1"
    s1: Stationary "Stationary Solver 1" | linpmethod = sol
      dDef: Direct
      fcDef: FullyCoupled
      p1: Parametric
        sweeptype = filled
        pname = {freq, m_out, m_in}
        plistarr = {f_0, range(-l_out,1,l_out), range(-l_in,1,l_in)}
        punit = {kHz, , }
        pcontinuationmode = no
  sol3 "Parametric Solutions 1" (study std2)

Datasets
  dset1: Solution | solution = sol1
  cpl1: CutPlane | data = dset1; quickplane = xz
  dset2: Solution | solution = sol2
  dset3: Solution | solution = sol3

Derived values
  gev1: EvalGlobal "Global Evaluation 1" | data = dset3; table = tbl28; expr = ap

Tables
  tbl23: Table
    // Global Evaluation 1
    l_out | l_in | m_in | m_out | freq | ap (1)
    0 | 0 | 0 | 0 | 200000 | -0.965926+0.182043i
    0 | 1 | -1 | 0 | 200000 | -1.9943e-05+2.0268e-05i
    0 | 1 | 0 | 0 | 200000 | -7.62249e-05-3.59399e-05i
    0 | 1 | 1 | 0 | 200000 | -1.98092e-05+1.47222e-05i
    1 | 0 | 0 | -1 | 200000 | 2.46074e-05-2.58083e-05i
    1 | 0 | 0 | 0 | 200000 | 1.01082e-05-1.06347e-05i
    1 | 0 | 0 | 1 | 200000 | -3.98725e-05-2.90525e-05i
    1 | 1 | -1 | -1 | 200000 | -0.93913-0.210955i
    1 | 1 | 0 | -1 | 200000 | -1.97372e-05-2.10877e-06i
    1 | 1 | 1 | -1 | 200000 | 4.36371e-05-2.17554e-06i
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  tbl24: Table
    // Global Evaluation 1
    l_out | l_in | m_in | m_out | freq | ap (1)
    0 | 0 | 0 | 0 | 200000 | -0.967651+0.180689i
    0 | 1 | -1 | 0 | 200000 | -3.70167e-05+5.69824e-06i
    0 | 1 | 0 | 0 | 200000 | 4.77822e-05+1.10173e-05i
    0 | 1 | 1 | 0 | 200000 | 3.59966e-05+5.35645e-05i
    1 | 0 | 0 | -1 | 200000 | 1.06499e-05+2.76101e-06i
    1 | 0 | 0 | 0 | 200000 | 4.68622e-08-7.95395e-07i
    1 | 0 | 0 | 1 | 200000 | -4.1192e-06+1.56039e-05i
    1 | 1 | -1 | -1 | 200000 | -0.940296-0.21231i
    1 | 1 | 0 | -1 | 200000 | -3.16714e-06+3.3182e-06i
    1 | 1 | 1 | -1 | 200000 | 1.75557e-05+3.23496e-06i
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  tbl25: Table
    // Global Evaluation 1
    l_out | l_in | m_in | m_out | freq | ap (1)
    0 | 0 | 0 | 0 | 200000 | 0.967651-0.180689i
    0 | 1 | -1 | 0 | 200000 | 3.70167e-05-5.69824e-06i
    0 | 1 | 0 | 0 | 200000 | -4.77822e-05-1.10173e-05i
    0 | 1 | 1 | 0 | 200000 | -3.59966e-05-5.35645e-05i
    1 | 0 | 0 | -1 | 200000 | -1.06499e-05-2.76101e-06i
    1 | 0 | 0 | 0 | 200000 | -4.68625e-08+7.95395e-07i
    1 | 0 | 0 | 1 | 200000 | 4.1192e-06-1.56039e-05i
    1 | 1 | -1 | -1 | 200000 | 0.940296+0.21231i
    1 | 1 | 0 | -1 | 200000 | 3.16714e-06-3.3182e-06i
    1 | 1 | 1 | -1 | 200000 | -1.75557e-05-3.23496e-06i
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  tbl26: Table
    // Global Evaluation 1
    l_out | l_in | m_in | m_out | freq | ap (1)
    0 | 0 | 0 | 0 | 200000 | -0.967651+0.180689i
    0 | 1 | -1 | 0 | 200000 | -0.000660488-0.00333115i
    0 | 1 | 0 | 0 | 200000 | 5.03219e-05+1.17754e-05i
    0 | 1 | 1 | 0 | 200000 | -0.000584813-0.00328055i
    1 | 0 | 0 | -1 | 200000 | 1.06499e-05+2.76101e-06i
    1 | 0 | 0 | 0 | 200000 | 4.68624e-08-7.95395e-07i
    1 | 0 | 0 | 1 | 200000 | -4.1192e-06+1.56039e-05i
    1 | 1 | -1 | -1 | 200000 | -0.952609-0.21509i
    1 | 1 | 0 | -1 | 200000 | -1.56327e-06+2.37591e-06i
    1 | 1 | 1 | -1 | 200000 | 2.05842e-05-4.92945e-07i
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  tbl27: Table
    // Global Evaluation 1
    l_out | l_in | m_in | m_out | freq | ap (1)
    0 | 0 | 0 | 0 | 200000 | -0.967651+0.180689i
    0 | 1 | -1 | 0 | 200000 | -3.74695e-05+5.75932e-06i
    0 | 1 | 0 | 0 | 200000 | 4.90505e-05+1.13279e-05i
    0 | 1 | 1 | 0 | 200000 | 3.79225e-05+5.62275e-05i
    1 | 0 | 0 | -1 | 200000 | 1.06499e-05+2.76101e-06i
    1 | 0 | 0 | 0 | 200000 | 4.68623e-08-7.95395e-07i
    1 | 0 | 0 | 1 | 200000 | -4.1192e-06+1.56039e-05i
    1 | 1 | -1 | -1 | 200000 | -0.951156-0.214762i
    1 | 1 | 0 | -1 | 200000 | -1.49862e-06+2.29188e-06i
    1 | 1 | 1 | -1 | 200000 | 2.05428e-05-5.00968e-07i
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  tbl28: Table
    // Global Evaluation 1
    l_out | l_in | m_in | m_out | freq | ap (1)
    0 | 0 | 0 | 0 | 200000 | -0.665438+0.126073i
    0 | 1 | -1 | 0 | 200000 | 5.7683e-06-1.21792e-05i
    0 | 1 | 0 | 0 | 200000 | 1.96848e-05-8.5515e-06i
    0 | 1 | 1 | 0 | 200000 | 1.07086e-05-1.54527e-05i
    0 | 2 | -2 | 0 | 200000 | 6.74663e-06+4.93181e-06i
    0 | 2 | -1 | 0 | 200000 | 3.50423e-06-6.60855e-06i
    0 | 2 | 0 | 0 | 200000 | 9.80725e-06+4.23846e-06i
    0 | 2 | 1 | 0 | 200000 | 4.12414e-06+3.36023e-07i
    0 | 2 | 2 | 0 | 200000 | -9.07461e-07+4.04681e-06i
    1 | 0 | 0 | -1 | 200000 | 1.87849e-05-3.67635e-05i
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