// COMSOL Multiphysics 6.2.0.658 model "acoustic-solid_sphere_coreshell_cross-section.mph"
// Outline of the model tree

Parameters
  r_decomp = 2.05[cm]  // Radius of the integration contour
  r_domain = 45[cm]  // Radius of the domain
  d_pml = 15[cm]  // Thickness PML
  r_shell_1 = 0.5[cm]
  r_shell_2 = 1.5[cm]
  r_obj = 2[cm]  // Radius of the object
  rho_domain = 1000[kg/m^3]  // Density of the domain
  c_domain = sqrt(21)*100[m/s]  // Speed of sound of the domain
  rho_1 = 1050-50i[kg/m^3]
  rho_2 = 2331-100j[kg/m^3]
  rho_obj = 2230-80j[kg/m^3]  // Density of the object
  c_1 = 2350+1100i[m/s]  // Speed of pressure waves in the object
  c_2 = 8490+1400j[m/s]  // Speed of pressure waves in the object
  c_obj = 5661+1200j[m/s]  // Speed of pressure waves in the object
  c_1_t = 0[m/s]
  c_2_t = 5660+500j[m/s]
  c_obj_t = 3392+1000j[m/s]  // Speed of shear waves in the object
  f_0 = 5[kHz]  // Frequency
  lam_domain = c_domain/f_0  // Wavelength in the domain
  lam_obj = c_obj/f_0  // Wavelength of pressure waves in the object
  lam_obj_t = c_obj_t/f_0  // Wavelength of shear waves in the object

Variables
  var1 "Variables 1"
    theta = atan2(r, z)  // Polar angle
    vs_r = d(acpr.p_s, r)/(-i*rho_domain*acpr.omega)  // Scattered velocity, r component
    vs_z = d(acpr.p_s, z)/(-i*rho_domain*acpr.omega)  // Scattered velocity, z component
    s_r = real( conj(acpr.p_s) * vs_r )/2  // Poynting vector of scattered field, r component
    s_z = real( conj(acpr.p_s) * vs_z )/2  // Poynting vector of scattered field, z component
    I_inc = (1[Pa])^2 / (2*c_domain*rho_domain)  // Intensity of the incident plane wave
    P_sc = -intop1((s_r*nr +s_z*nz)*sin(theta))*2*pi*r_decomp  // Total scattered power
    sigma_sc = P_sc / I_inc  // Scattering cross-section
    sigma_geom = pi*r_obj*r_obj  // Geomertical cross-section
    Q_sc = sigma_sc / sigma_geom  // Scattering efficiency
    vt_r = d(acpr.p_t, r)/(-i*rho_domain*acpr.omega)  // Total velocity, r component
    vt_z = d(acpr.p_t, z)/(-i*rho_domain*acpr.omega)  // Total velocity, z component
    st_r = real( conj(acpr.p_t) * vt_r )/2  // Poynting vector of tota field, r component
    st_z = real( conj(acpr.p_t) * vt_z )/2  // Poynting vector of total field, z component
    P_abs = intop1((st_r*nr +st_z*nz)*sin(theta))*2*pi*r_decomp  // Total absorped power
    sigma_abs = P_abs / I_inc  // Absorption cross-section
    Q_abs = sigma_abs / sigma_geom  // Absorption efficiency
    Q_ext = Q_sc+Q_abs  // Extinction efficiency

Couplings
  intop1: Integration on boundaries 17, 24

Coordinate systems
  pml1: PML "Perfectly Matched Layer 1" on domains 1, 8

Geometry
  geom1 "Geometry 1" (2D axisymmetric, length unit m)
    c1: Circle "Object" | rot = -90; r = r_obj; angle = 180
    c2: Circle "Domain"
      rot = -90
      layername = {Layer 1, Layer 2}
      layer = {d_pml, r_domain - r_decomp}
      r = r_domain + d_pml
      angle = 180
    c3: Circle | rot = -90; r = r_shell_1; angle = 180
    c4: Circle | rot = -90; r = r_shell_2; angle = 180
    fin: Finalize "Form Union"

Materials
  mat1: Common "Material Domain" on domains 1-3, 7, 8
    def "Basic"
      density = rho_domain
      soundspeed = c_domain
  mat2: Common "Material Object" on domains 4
    def "Basic"
      density = rho_obj
    CpCs "Pressure-wave and shear-wave speeds"
      cp = c_obj
      cs = c_obj_t
  mat3: Common "Material 3" on domains 6
    def "Basic"
      density = rho_1
    CpCs "Pressure-wave and shear-wave speeds"
      cp = c_1
      cs = c_1_t
  mat4: Common "Material 4" on domains 5
    def "Basic"
      density = rho_2
    CpCs "Pressure-wave and shear-wave speeds"
      cp = c_2
      cs = c_2_t

Physics
  acpr: PressureAcoustics "Pressure Acoustics, Frequency Domain" on domains 1-3, 7, 8
    dependent variable p
    EquationSettings.m = 0
    fpam1: FrequencyPressureAcousticsModel "Pressure Acoustics 1" (default)
    axi1: AxialSymmetry (default)
    shb1: SoundHard "Sound Hard Boundary (Wall) 1" (default)
    init1: init "Initial Values 1" (default)
    bpf1: BackgroundPressureField on domains 2, 3, 7 | pamp = 1; c_mat = from_mat
  solid: SolidMechanics on domains 4-6
    dependent variable u = {u, v, w}
    Mode2Daxi.ModeExtension = 1
    Mode2Daxi.mk = 0
    lemm1: LinearElasticModel "Linear Elastic Material 1" (default) | IsotropicOption = CpCs
    axi1: AxialSymmetrySolid "Axial Symmetry 1" (default)
    free1: Free (default)
    init1: init "Initial Values 1" (default)

Multiphysics
  asb1: AcousticStructureBoundary on boundaries 18, 23 | Acoustics_physics = acpr; Structure_physics = solid

Mesh
  mesh1 "Mesh 1"
    size: MeshSizeDefault | hmax = 0.012; hmin = 2.4E-5; hcurve = 0.2; hauto = 1
    size1: Size on domains 2, 3, 7 | hmin = 1.2000E-5; custom = on
    se1: SizeExpression on domains 2, 3, 7
      evaltype = initialexpression
      sizeexpr = subst(real(acpr.c_c),acpr.freq,freqmax)/freqmax/5
      cellsize = 0.048
      solution = sol1
      weights = 1
      horder = 0
      studystep = freq
      solupdatenum = 12
    dis1: Distribution on boundaries 1, 12, 14 | type = predefined; elemcount = 8
    ftri1: FreeTri "Free Triangular 1" on domains 2-7 | smoothmaxiter = 4; smoothmaxdepth = 4
    map1: Map "Mapped 1" on domains 1, 8 | adjustedgdistr = on; smoothmaxiter = 4; smoothmaxdepth = 4

Studies
  std1 "Study 1"
    freq: Frequency "Frequency Domain" | plist = range(5000,1025,25500)

Solver configurations
  sol1 "Solution 1" (study std1)
    v1: Variables "Dependent Variables 1"
    s1: Stationary "Stationary Solver 1" | linpmethod = sol
      dDef: Direct
      p1: Parametric | pname = freq; plistarr = range(5000,1025,25500); punit = Hz; pcontinuationmode = no
      fc1: FullyCoupled | linsolver = dDef

Datasets
  dset1: Solution | solution = sol1
  rev1: Revolve2D "Revolution 2D 1" | data = dset1; startangle = -90; revangle = 225
  dset1solidrev: Revolve2D "Revolution 2D" | data = dset1; startangle = -90; revangle = 225; modenumber = solid.mk

Derived values
  gev1: EvalGlobal "Global Evaluation 1" | data = dset1; table = tbl35; expr = {Q_sc, Q_ext}

Tables
  tbl1: Table
    // Global Evaluation 1
    freq (Hz) | Scattering efficiency (m)
    7000 | 0.0031319
  tbl2: Table
    // Global Evaluation 1
    freq (Hz) | Scattering efficiency (m)
    7000 | 0.00771225
  tbl3: Table
    // Global Evaluation 1
    freq (Hz) | Scattering efficiency (m)
    17000 | 0.122472
  tbl4: Table
    // Global Evaluation 1
    freq (Hz) | Scattering efficiency (m)
    17000 | -0.122472
  tbl5: Table
    // Global Evaluation 1
    freq (Hz) | Scattering efficiency (m)
    17000 | 0.142495
  tbl6: Table
    // Global Evaluation 1
    freq (Hz) | Scattering efficiency (m) | Scattering efficiency (m)
    17000 | 0.142495 | 0.378689
  tbl7: Table
    // Global Evaluation 1
    freq (Hz) | Scattering efficiency (m) | Scattering efficiency (m)
    17000 | 0.142495 | 0.267969
  tbl8: Table
    // Global Evaluation 1
    freq (Hz) | Scattering efficiency (1)
    17000 | 2.37491
  tbl9: Table
    // Global Evaluation 1
    freq (Hz) | Scattering efficiency (1)
    17000 | 4.46616
  tbl10: Table
    // Global Evaluation 1
    freq (Hz) | Scattering efficiency (1)
    17000 | 2.19112
  tbl11: Table
    // Global Evaluation 1
    freq (Hz) | Scattering efficiency (1)
    17000 | 2.15123
  tbl12: Table
    // Global Evaluation 1
    freq (Hz) | Scattering efficiency (1)
    17000 | 2.15123
  tbl13: Table
    // Global Evaluation 1
    freq (Hz) | Omega (1)
    17000 | -62.0125
  tbl14: Table
    // Global Evaluation 1
    freq (Hz) | Omega (m^2) | Int (m^2) | Int (m)
    17000 | 1.39528 | 0.282743 | 0.471239
  tbl15: Table
    // Global Evaluation 1
    freq (Hz) | Scattering efficiency (1)
    17000 | 0.741469
  tbl16: Table
    // Global Evaluation 1
    freq (Hz) | Scattering efficiency (1) | Scattering efficiency (1)
    17000 | 0.717099 | 0.700962
  tbl17: Table
    // Global Evaluation 1
    freq (Hz) | Scattering efficiency (1)
    17000 | 0.698211
  tbl18: Table
    // Global Evaluation 1
    freq (Hz) | Scattering efficiency (1)
    17000 | 0.694991
  tbl19: Table
    // Global Evaluation 1
    freq (Hz) | Scattering efficiency (1)
    17000 | 0.694036
  tbl20: Table
    // Global Evaluation 1
    freq (Hz) | Scattering efficiency (1)
    17000 | 0.694904
  tbl21: Table
    // Global Evaluation 1
    freq (Hz) | Scattering efficiency (1)
    7000 | 0.0781286
  tbl22: Table
    // Global Evaluation 1
    freq (Hz) | Scattering efficiency (1)
    57000 | 1.40005
  tbl23: Table
    // Global Evaluation 1
    freq (Hz) | Scattering efficiency (1)
    7000 | 0.0782711
    9500 | 0.319572
    12000 | 0.395979
    14500 | 0.545448
    17000 | 0.69473
    19500 | 0.871876
    22000 | 1.02194
    24500 | 1.15165
    27000 | 1.26015
    29500 | 1.35056
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  tbl24: Table
    // Global Evaluation 1
    freq (Hz) | Scattering efficiency (1)
    7000 | 0.0278426
    9500 | 0.0744972
    12000 | 0.147169
    14500 | 0.248599
    17000 | 0.397842
    19500 | 0.662005
    22000 | 1.20479
    24500 | 2.24445
    27000 | 3.36367
    29500 | 3.61169
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  tbl25: Table
    // Global Evaluation 1
    freq (Hz) | Scattering efficiency (1)
    7000 | 0.0392382
    9500 | 0.102351
    12000 | 0.192615
    14500 | 0.299455
    17000 | 0.417383
    19500 | 0.552486
    22000 | 0.70451
    24500 | 0.864413
    27000 | 1.00493
    29500 | 1.11405
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  tbl26: Table
    // Global Evaluation 1
    freq (Hz) | Scattering efficiency (1)
    7000 | 0.0391996
    9500 | 0.102234
    12000 | 0.192374
    14500 | 0.299065
    17000 | 0.416873
    19500 | 0.551921
    22000 | 0.703958
    24500 | 0.863861
    27000 | 1.0043
    29500 | 1.11329
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  tbl27: Table
    // Global Evaluation 1
    freq (Hz) | Scattering efficiency (1)
    7000 | 0.0391996
    9500 | 0.102234
    12000 | 0.192374
    14500 | 0.299065
    17000 | 0.416873
    19500 | 0.551921
    22000 | 0.703958
    24500 | 0.863861
    27000 | 1.0043
    29500 | 1.11329
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  tbl28: Table
    // Global Evaluation 1
    freq (Hz) | Scattering efficiency (1)
    7000 | 0.0393026
    9500 | 0.102499
    12000 | 0.192861
    14500 | 0.299806
    17000 | 0.417881
    19500 | 0.553226
    22000 | 0.7056
    24500 | 0.865898
    27000 | 1.00676
    29500 | 1.11616
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  tbl29: Table
    // Global Evaluation 1
    freq (Hz) | Scattering efficiency (1)
    7000 | 0.0392897
    9500 | 0.102442
    12000 | 0.192689
    14500 | 0.299423
    17000 | 0.417202
    19500 | 0.552199
    22000 | 0.704178
    24500 | 0.863945
    27000 | 1.00407
    29500 | 1.11248
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  tbl30: Table
    // Global Evaluation 1
    freq (Hz) | Scattering efficiency (1)
    7000 | 0.0392996
    9500 | 0.102462
    12000 | 0.192711
    14500 | 0.299436
    17000 | 0.417203
    19500 | 0.552197
    22000 | 0.704189
    24500 | 0.863961
    27000 | 1.00405
    29500 | 1.11237
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  tbl31: Table
    // Global Evaluation 1
    freq (Hz) | Scattering efficiency (1)
    7000 | 0.0392996
    9500 | 0.102462
    12000 | 0.192711
    14500 | 0.299436
    17000 | 0.417203
    19500 | 0.552197
    22000 | 0.704189
    24500 | 0.863961
    27000 | 1.00405
    29500 | 1.11237
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  tbl32: Table
    // Global Evaluation 1
    freq (Hz) | Scattering efficiency (1) | Extinction efficiency (1)
    7000 | 0.0392996 | 0.0572308
    9500 | 0.102462 | 0.12484
    12000 | 0.192711 | 0.217525
    14500 | 0.299436 | 0.324625
    17000 | 0.417203 | 0.441318
    19500 | 0.552197 | 0.574759
    22000 | 0.704189 | 0.725492
    24500 | 0.863961 | 0.884559
    27000 | 1.00405 | 1.02444
    29500 | 1.11237 | 1.13277
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  tbl33: Table
    // Global Evaluation 1
    freq (Hz) | Scattering efficiency (1) | Extinction efficiency (1)
    5000 | 0.401647 | 0.425995
    6025 | 0.578427 | 0.599154
    7050 | 0.775043 | 0.791751
    8075 | 0.955834 | 0.969036
    9100 | 1.08393 | 1.09435
    10125 | 1.16275 | 1.17105
    11150 | 1.20798 | 1.21467
    12175 | 1.22361 | 1.22906
    13200 | 1.21919 | 1.22369
    14225 | 1.21186 | 1.21561
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  tbl34: Table
    // Global Evaluation 1
    freq (Hz) | Scattering efficiency (1) | Extinction efficiency (1)
    5000 | 0.401563 | 0.427074
    6025 | 0.578208 | 0.600553
    7050 | 0.774586 | 0.793499
    8075 | 0.955046 | 0.971099
    9100 | 1.08282 | 1.09674
    10125 | 1.16138 | 1.17383
    11150 | 1.20637 | 1.21788
    12175 | 1.22178 | 1.23271
    13200 | 1.21716 | 1.2278
    14225 | 1.2096 | 1.22017
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  tbl35: Table
    // Global Evaluation 1
    freq (Hz) | Scattering efficiency (1) | Extinction efficiency (1)
    5000 | 0.401503 | 0.427933
    6025 | 0.578012 | 0.601369
    7050 | 0.774204 | 0.794211
    8075 | 0.95445 | 0.97166
    9100 | 1.08203 | 1.09713
    10125 | 1.16044 | 1.17409
    11150 | 1.20536 | 1.21806
    12175 | 1.22076 | 1.23286
    13200 | 1.21618 | 1.22796
    14225 | 1.20869 | 1.22037
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
Plots
  pg1: PlotGroup2D "Acoustic Pressure (acpr)" | data = dset1
    surf1: Surface | expr = acpr.p_t
  pg2: PlotGroup2D "Sound Pressure Level (acpr)" | data = dset1
    surf1: Surface | expr = acpr.Lp_t
  pg3: PlotGroup3D "Acoustic Pressure, 3D (acpr)" | data = rev1
    surf1: Surface | expr = acpr.p_t
  pg4: PlotGroup3D "Sound Pressure Level, 3D (acpr)" | data = rev1
    surf1: Surface | expr = acpr.Lp_t
  pg5: PlotGroup2D "Stress (solid)" | data = dset1
    surf1: Surface | expr = solid.misesGp_peak
      def: Deform "Deformation" | expr = {u, w}; descr = Displacement field
  pg6: PlotGroup3D "Stress, 3D (solid)" | data = dset1solidrev
    surf1: Surface | expr = solid.misesGp_peak
      def: Deform "Deformation" | revcoordsys = cylindrical; expr = {u, v, w}; descr = Displacement field
  pg7: PlotGroup1D "1D Plot Group 7" | data = none
    tblp1: Table "Table Graph 1" | table = tbl23