// COMSOL Multiphysics 6.2.0.658 model "acoustic_tmatrix_axisym_fastsweep_sphere.mph"
// Outline of the model tree

Parameters
  m_in = mpind - l_in^2 - l_in  // Order incident wave
  l_out = 0  // Degree scattered wave
  mpind = 0  // Index for sweeping
  l_in = floor(sqrt(mpind)+1e-3)  // Degree incident wave
  mpindmax = l_max^2 + 2*l_max
  l_max = 2  // Maximum degree
  r_decomp = 0.6[cm]  // Radius of the decomposition
  r_domain = 3*lam_domain  // Radius of the domain
  d_pml = 2*lam_domain  // Thickness PML
  r_obj = 0.5[cm]  // Radius of the object
  rho_domain = 998[kg/m^3]  // Density of the domain
  c_domain = 1497 [m/s]  // Speed of sound of the domain
  rho_obj = 1050-50i[kg/m^3]  // Density of the object
  c_obj = 2350+300i[m/s]  // Speed of sound of the object
  f_0 = 200[kHz]  // Frequency
  lam_domain = c_domain/f_0  // Wavelength in the domain
  lam_obj = c_obj/f_0  // Wavelength in the object

Functions
  an1: Analytic "Spherical Bessel First Kind" | funcname = sphbesselj; expr = sqrt(pi / (2 * (x + 1e-9))) * besselj(l + 0.5, x); args = {l, x}; argunit = {, }
  an2: Analytic "Spherical Hankel Second Kind" | funcname = sphhankelh2; expr = sqrt(pi / (2 * x)) * (besselj(l + 0.5, x) - i * bessely(l + 0.5, x)); args = {l, x}; argunit = {, }; complex = on
  an9: Analytic "Tau function" | funcname = taulm; expr = (legendre(l, m + 1, cos(theta)) - (l + m) * (l - m + 1) * legendre(l, m - 1, cos(theta))) * 0.5; args = {l, m, theta}; argunit = {, , }
  an3: Analytic "Prefactor SH" | funcname = gammalm; expr = sqrt((2 * l + 1) * factorial(l - m) / (4 * pi * factorial(l + m))); args = {l, m}; argunit = {, }
  an4: Analytic "Scalar Spherical Y" | funcname = Ylm; expr = gammalm(l, m) * exp(i * m * phi) * legendre(l, m, cos(theta)); args = {l, m, theta, phi}; argunit = {, , , }; complex = on
  an5: Analytic "Scalar Spherical RgPsi" | funcname = RgPsi; expr = sphbesselj(l, x) * Ylm(l, m, theta, phi); args = {l, m, x, theta, phi}; argunit = {, , , , }; complex = on
  an6: Analytic "Vector Spherical RgLrho"
    funcname = RgLrho
    expr = ((l/(x+1e-9)*sphbesselj(l, x) - sphbesselj(l+1, x)) * legendre(l, m, cos(theta)) * sin(theta) + cos(theta) * taulm(l, m, theta) * sphbesselj(l, x)/(x+1e-9)) * gammalm(l, m) * exp(i * m * phi)
    args = {l, m, x, theta, phi}
    argunit = {, , , , }
    complex = on
  an10: Analytic "Vector Spherical RgLz"
    funcname = RgLz
    expr = ((l/(x+1e-9)*sphbesselj(l, x) - sphbesselj(l+1, x)) * legendre(l, m, cos(theta)) * cos(theta) - sin(theta) * taulm(l, m, theta) * sphbesselj(l, x)/(x+1e-9)) * gammalm(l, m) * exp(i * m * phi)
    args = {l, m, x, theta, phi}
    argunit = {, , , , }
    complex = on

Variables
  var3 "Variables Simulation"
    rs = sqrt(r * r + z * z)  // Radius
    theta = atan2(r, z)  // Polar angle
    delta_rho = rho_obj - rho_domain
    delta_beta = (rho_obj*c_obj^2)^(-1) - (rho_domain*c_domain^2)^(-1)
    p_inc = conj(RgPsi(l_in, m_in, acpr.omega/c_domain * rs, theta, 0)) * 1[Pa]  // Incident P-field
    vrho_inc = conj(RgLrho(l_in, m_in, acpr.omega/c_domain * rs, theta, 0)) / (-i * rho_domain * c_domain) * 1[Pa]  // Incident V-field, x-component
    vz_inc = conj(RgLz(l_in, m_in, acpr.omega/c_domain * rs, theta, 0)) / (-i * rho_domain * c_domain) * 1[Pa]  // Incident V-field, z-component
    Q = acpr.omega^2 * delta_beta * p_inc  // Source monopole
    qrho = -i*acpr.omega * delta_rho * vrho_inc  // Source dipole, rho-component
    qz = -i*acpr.omega * delta_rho * vz_inc  // Source dipole, z-component
  var2 "Variables Decomposition"
    xp = acpr.omega/c_domain * r_decomp
    shh2p = sphhankelh2(l_out, xp)
    intY = 2*pi*intop1(sin(theta) * Ylm(l_out, m_in, theta, 0) * withsol('sol8', acpr.p_s, setval(mpind, l_in^2 + m_in + l_in), setval(freq, freq))) / r_decomp
    ap = conj(intY/shh2p) * 1[1/Pa]

Couplings
  intop1: Integration on boundaries 13, 16

Coordinate systems
  pml1: PML "Perfectly Matched Layer 1" on domains 1, 6

Geometry
  geom1 "Geometry 1" (2D axisymmetric, length unit mm)
    c1: Circle "Object" | rot = -90; r = r_obj; angle = 180
    c2: Circle "Domain"
      rot = -90
      layername = {Layer 1, Layer 2}
      layer = {d_pml, r_domain - r_decomp}
      r = r_domain + d_pml
      angle = 180
    fin: Finalize "Form Union"

Materials
  mat1: Common "Material Domain" on all domains
    def "Basic"
      density = rho_domain
      soundspeed = c_domain
  mat2: Common "Material Object" on domains 4
    def "Basic"
      density = rho_obj
      soundspeed = c_obj

Physics
  acpr: PressureAcoustics "Pressure Acoustics, Frequency Domain" on all domains
    dependent variable p
    MeshControl.ElementsPerWavelength = Automatic
    EquationSettings.m = m_in
    PortSweepSettings.ModeShapeNormalization = Amplitude
    fpam1: FrequencyPressureAcousticsModel "Pressure Acoustics 1" (default)
    axi1: AxialSymmetry (default)
    shb1: SoundHard "Sound Hard Boundary (Wall) 1" (default)
    init1: init "Initial Values 1" (default)
    ms1: MonopoleSource "Monopole Domain Source 1" on domains 4 | Q = Q
    ds1: DipoleSource "Dipole Domain Source 1" on domains 4 | q = {qrho, 0, qz}

Mesh
  mesh1 "Mesh 1"
    size: MeshSizeDefault | hmax = 5.01; hmin = 0.0225; hcurve = 0.3; hgrad = 1.3
    size1: Size on domains 2-5 | hmax = lam_domain/10
    dis1: Distribution on boundaries 1, 8, 10 | type = predefined; elemcount = 8
    ftri2: FreeTri "Free Triangular 2" on domains 4
      size1: Size on domains 4 | hmax = min(r_obj/10, lam_obj/10); custom = on
    ftri1: FreeTri "Free Triangular 1" on domains 2, 3, 5
    map1: Map "Mapped 1" on domains 1, 6 | adjustedgdistr = on; smoothmaxiter = 4; smoothmaxdepth = 4

Studies
  std3 "Study 1"
    freq: Frequency "Frequency Domain" | plist = f_0; useparam = on
  std2 "Study 2"
    param: Parametric "Parametric Sweep l_out" | pname = l_out; plistarr = range(0,1,l_max)
    param2: Parametric "Parametric Sweep l_in" | pname = l_in; plistarr = range(0,1,l_in)
    freq: Frequency "Frequency Domain" | plist = f_0; useparam = on; sweeptype = filled

Solver configurations
  sol2 "Solution 2" (study std2)
    v1: Variables "Dependent Variables 1"
    s1: Stationary "Stationary Solver 1" | linpmethod = sol
      dDef: Direct
      fcDef: FullyCoupled
      p1: Parametric
        sweeptype = filled
        pname = {freq, m_in}
        plistarr = {f_0, range(-min(l_in, l_out), 1, min(l_in, l_out))}
        punit = {Hz, }
        pcontinuationmode = no
  sol3 "Parametric Solutions 1" (study std2)
  sol8 "Solution 8" (study std3)
    v1: Variables "Dependent Variables 1"
    s1: Stationary "Stationary Solver 1" | linpmethod = sol
      dDef: Direct
      p1: Parametric
        sweeptype = filled
        pname = {freq, mpind}
        plistarr = {f_0, range(0,1,mpindmax)}
        punit = {Hz, }
        pcontinuationmode = no
      fc1: FullyCoupled | linsolver = dDef

Datasets
  dset2: Solution | solution = sol2
  dset3: Solution | solution = sol3
  dset4: Solution | solution = sol8
  rev1: Revolve2D "Revolution 2D 1" | data = dset4; startangle = -90; revangle = 225

Derived values
  gev1: EvalGlobal "Global Evaluation 1" | data = dset3; table = tbl1; expr = ap

Tables
  tbl1: Table
    // Global Evaluation 1
    l_in | l_out | freq (Hz) | m_in | ap (1)
    0 | 0 | 200000 | 0 | -0.665822+0.125882i
    0 | 1 | 200000 | 0 | -3.37865e-06-3.17543e-06i
    0 | 2 | 200000 | 0 | -4.07886e-06+1.08822e-05i
    1 | 0 | 200000 | 0 | 1.6864e-06+2.42019e-06i
    1 | 1 | 200000 | -1 | -0.866653-0.158478i
    1 | 1 | 200000 | 0 | -0.856097-0.139282i
    1 | 1 | 200000 | 1 | -0.866653-0.158478i
    1 | 2 | 200000 | -1 | 6.97917e-06-4.67216e-06i
    1 | 2 | 200000 | 0 | -2.5743e-05+5.99555e-07i
    1 | 2 | 200000 | 1 | 6.97917e-06-4.67216e-06i
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
Plots
  pg1: PlotGroup2D "Acoustic Pressure (acpr)" | data = dset4
    surf1: Surface | expr = acpr.p_t
  pg2: PlotGroup2D "Sound Pressure Level (acpr)" | data = dset4
    surf1: Surface | expr = acpr.Lp_t
  pg3: PlotGroup3D "Acoustic Pressure, 3D (acpr)" | data = rev1
    surf1: Surface | expr = acpr.p_t
  pg4: PlotGroup3D "Sound Pressure Level, 3D (acpr)" | data = rev1
    surf1: Surface | expr = acpr.Lp_t